#ifmissing "123.glm"
#model get IEEE/123
#endif
#include "123.glm"
modify load_1.constant_power_A 48.0+24.0j kVA;
modify load_2.constant_impedance_B 100+10j Ohm;
modify load_4.constant_power_C 0+0j kVA;
object load
{
    name load_115;
    groupid nodevolts;
    phases AN;
    constant_power_A @load_114; // copy from load_114
    nominal_voltage 2401.7771;
}
object overhead_line
{
    name line114to115;
    phases AN;
    from load_114;
    to load_115;
    length 325.00;
    configuration lc309;
}
object load
{
    parent load_115;
    name load_116;
    groupid nodevolts;
    phases AN;

    constant_power_A_real (load_114.constant_power_A_real*2); // double load_114
    constant_power_A_reac (load_114.constant_power_A_reac*2); // double load_114
    nominal_voltage 2401.7771;
    constant_current_Α = constant_power_Α / nominal_voltage
}
#output "IEEE-123-voltage-profile.png" -t profile -l 10
